units metal
atom_style atomic
boundary p p p

#state variables
variable Tliq_i equal 100
variable Tliq_f equal 2000
#variable Pliq equal 340


variable        dt equal 0.001

variable        Tdamp equal 0.1*0.001/${dt}
variable        Pdamp equal 1*0.001/${dt}
variable distri_root equal 87287

#sampling variables
# Pass -var stamp YYYYMMDD_HHMMSS so dumps/logs do not overwrite previous runs.
variable stamp index nosuffix
variable nsteps equal 20000

log log_${stamp}.lammps

# Read data

read_data INtest.data

mass 1 26.9815
timestep ${dt}

###############################################################################
# NN
###############################################################################
# Variables
variable nnpCutoff       equal  6.80
pair_style hdnnp ${nnpCutoff} dir "./" showew no showewsum 1000 resetew yes maxew 100000000 cflength 1.0 cfenergy 1.0
pair_coeff * * Al

neighbor        1.5 bin
neigh_modify    delay 10

minimize 1.0e-4 1.0e-6 1000 10000

write_data  min_${stamp}.data

#thermalization
velocity 	all create ${Tliq_i} ${distri_root}

#thermo_style 	custom step temp press vol density pe ke etotal enthalpy
#thermo		10


dump equil  all custom 100 dump_equil_${stamp}.lammpstrj id type x y z vx vy vz

fix nvt_fix all nvt temp ${Tliq_i} ${Tliq_f} ${Tdamp}
run ${nsteps}
#run 10000

unfix nvt_fix
undump equil

#production
#reset_timestep 0
#dump myDump  all custom 100 dump.lammpstrj id type x y z vx vy vz

#fix 1 all npt temp ${Tliq} ${Tliq} ${Tdamp} iso ${Pliq} ${Pliq} ${Pdamp}
#run 10000
